# Simulación de la gráfica por series de Fourier
# Función propuesta:
[0, 0 ≤ t ≤ 4; -(t^2 - 12*t + 32), 4 ≤ t ≤ 6; 4, 6 ≤ t ≤ 9]
t_1 := 0, 0.1 .. 4
t_2 := 4, 4.1 .. 6
t_3 := 6, 6.1 .. 9
f_1(t_1) := 0
f_2(t_2) := -(t_2^2 - 12*t_2 + 32)
f_3(t_3) := 4
# [plot: f_1(t_1), f_2(t_2), f_3(t_3) vs t_1, t_2, t_3]
T := 9
k := 10000
d_1 := 2
d_2 := 3
r := 0.01
t_4 := -d_1*T, -d_1*T + r .. d_2*T
t_5 := 0, r .. T
w := 2*π/T
a_0 := 104/27
n := 1, 2 .. k
a_n(n) := 81/(4*π^3*n^3)*(-8/9*π*n*cos(8/9*π*n) + 2*(sin(4/3*π*n) - sin(8/9*π*n)))
b_n(n) := 4/(9*(n*w)^3)*(cos(8/9*π*n) - cos(4/3*π*n) - 4/9*π*n*sin(8/9*π*n)) - 8/(9*n*w)
f(t) := a_0/2 + sum(a_n(n)*cos(n*w*t) + b_n(n)*sin(n*w*t), n = 1 .. k)
# [plot: f(t_5) vs t_5]
# [plot: f(t_4) vs t_4]
m := 1, 2 .. 15
c(m) := 1/2*sqrt(a_n(|m|)^2 + b_n(|m|)^2)
ϕ(m) := atan(-b_n(|m|)/a_n(|m|))
ω(m) := m*w
# [plot: c(m), a_0/2, c(-m) vs ω(m), 0, ω(-m)]
# [plot: ϕ(m), ϕ(-m) vs ω(m), ω(-m)]
