# Simulación de la gráfica por series de Fourier
# Función propuesta:
[-4/5*t + 4, 0 ≤ t ≤ 5; 0, 5 ≤ t ≤ 10]
t_1 := 0, 0.1 .. 5
t_2 := 5, 5.1 .. 10
f_1(t_1) := -4/5*t_1 + 4
f_2(t_2) := 0
# [plot: f_1(t_1), f_2(t_2) vs t_1, t_2]
T := 10
k := 10000
d_1 := 2
d_2 := 3
r := 0.01
t_4 := -d_1*T, -d_1*T + r .. d_2*T
t_5 := 0, r .. T
w := 2*π/T
a_0 := 2
n := 1, 2 .. k
a_n(n) := (2/(n*π))^2*(1 - cos(π*n))
b_n(n) := 4/(n*π)*(1 - 1/(n*π)*sin(π*n))
f(t) := a_0/2 + sum(a_n(n)*cos(n*w*t) + b_n(n)*sin(n*w*t), n = 1 .. k)
# [plot: f(t_5) vs t_5]
# [plot: f(t_4) vs t_4]
m := 1, 2 .. 15
c(m) := 1/2*sqrt(a_n(|m|)^2 + b_n(|m|)^2)
ϕ(m) := atan(-b_n(|m|)/a_n(|m|))
ω(m) := m*w
# [plot: c(m), a_0/2, c(-m) vs ω(m), 0, ω(-m)]
# [plot: ϕ(m), ϕ(-m) vs ω(m), ω(-m)]
