# Simulación de la grafica por series de Fourier
# Comprobación del modelo matemático propuesto para el primer periodo de la grafica
# Función propuesta
[5/3*t, 0 ≤ t < 3; 2*t - 6, 3 ≤ t < 6; 7/3*t - 14, 6 ≤ t < 9]
x_1 := 0 .. 3
x_2 := 3 .. 6
x_3 := 6 .. 9
f_1(x_1) := 5/3*x_1
f_2(x_2) := 2*x_2 - 6
f_3(x_3) := 7/3*x_3 - 14
# [plot: f_1(x_1), f_2(x_2), f_3(x_3) vs x_1, x_2, x_3]
# grafica de la serie de Fourier de la función dada
T := 9
k := 10000
d_1 := 2
d_2 := 3
r := 0.01
t := -d_1*T, -d_1*T + r .. d_2*T
t_1 := 0, 0.01 .. T
w := 2*π/T
a_0 := 6
n := 1, 2 .. k
a_n(n) := 2/9*(-1/(n*w)*sin(2/3*π*n) - 2/(3*(n*w)^2)*cos(2/3*π*n) + 2/3*1/(n*w)^2)
b_n(n) := -2/(9*n*w)*(11*cos(2/3*π*n) + 7)
f(t) := a_0/2 + sum(a_n(n)*cos(n*w*t) + b_n(n)*sin(n*w*t), n = 1 .. k)
# [plot: f(t_1) vs t_1]
# [plot: f(t) vs t]
# Espectro de amplitud y espectro de frecuencia
m := 1, 2 .. 15
c(m) := 1/2*sqrt(a_n(|m|)^2 + b_n(|m|)^2)
ϕ(m) := atan(-b_n(|m|)/a_n(|m|))
ω(m) := m*w
# [plot: c(m), a_0/2, c(-m) vs ω(m), 0, ω(-m)]
# [plot: ϕ(m), ϕ(-m) vs ω(m), ω(-m)]
