# Simulación de la grafica por series de Fourier
# Comprobación del modelo matemático propuesto para el primer periodo de la grafica
# Función propuesta
[-(t^2 + 4*t), -4 ≤ t ≤ 0; (t^2 - 4*t), 0 ≤ t ≤ 4]
t_1 := -4, -3.9 .. 0
t_2 := 0, 0.1 .. 4
f_1(t_1) := -(t_1^2 + 4*t_1)
f_2(t_2) := (t_2^2 - 4*t_2)
# [plot: f_1(t_1), f_2(t_2) vs t_1, t_2]
# grafica de la serie de Fourier de la función dada
T := 8
k := 10000
d_1 := 2
d_2 := 3
r := 0.01
t := -d_1*T, -d_1*T + r .. d_2*T
t_3 := -4, -3.99 .. T - 4
w := 2*π/T
a_0 := 0
n := 1, 2 .. k
a_n(n) := 0
b_n(n) := 1/(2*(n*w)^3)*((2 - (n*π)^2)*cos(π*n) - 2) + 8/(n*w)*cos(π*n)
f(t) := a_0/2 + sum(a_n(n)*cos(n*w*t) + b_n(n)*sin(n*w*t), n = 1 .. k)
# [plot: f(t_3) vs t_3]
# [plot: f(t) vs t]
# Espectro de amplitud y espectro de frecuencia
m := 1, 2 .. 15
c(m) := 1/2*sqrt(a_n(|m|)^2 + b_n(|m|)^2)
ϕ(m) := atan(-b_n(|m|)/a_n(|m|))
ω(m) := m*w
ϕ(m) := π/2
# Debido a que la tangente inversa de infinito es 90 grados o pi / 2, redefinimos
# el espectro de frecuencia  de esa manera
# [plot: c(m), a_0/2, c(-m) vs ω(m), 0, ω(-m)]
# [plot: ϕ(m), 0, ϕ(-m) vs ω(m), 0, ω(-m)]
